<neuroml xmlns="http://www.neuroml.org/schema/neuroml2"  xmlns:xs="http://www.w3.org/2001/XMLSchema" xmlns:xsi="http://www.w3.org/2001/XMLSchema-instance" xsi:schemaLocation="http://www.neuroml.org/schema/neuroml2 https://raw.github.com/NeuroML/NeuroML2/development/Schemas/NeuroML2/NeuroML_v2.3.xsd" id="L5PC_Net">
    <notes>Generated by NeuroMLlite v0.5.7
    Generated network: L5PC_Net
    Generation seed: 1234
    NeuroMLlite parameters:
        input_amp = 1.0643</notes>
    <include href="/home/kedoxey/CRCNS/PyramidalCellSimulations/models/NeuroML/NMLCL000073-NeuroML/L5PC.cell.nml"/>
    <network id="L5PC_Net">
        <notes>Hay et al. 2011 model of Neocortex Layer 5 Pyramidal Cell for import into NetPyNE</notes>
        <population id="L5PC_Pop" component="L5PC" size="1"/>
    </network>
</neuroml>
